units           real

boundary        p p p

atom_style      atomic
atom_modify     map array
atom_modify     sort 0 0.0
lattice         sc 14.375

region          total block -4 4 -4 4 -4 4
create_box      1 total
create_atoms    1 region total

pair_style      lj/cut 22.98
pair_coeff      1 1 0.23852 3.405
pair_modify     shift yes tail no

mass            1 39.948

neighbor        1.0 bin
neigh_modify    every 1 delay 5 check yes
timestep        5.0

variable        t equal 80.7
variable        damp equal 1000.0

thermo          10000
thermo_style    custom step temp pe ke time etotal atoms

fix             2 all temp/csld $t $t ${damp} 685540
fix             3 all plumed plumedfile smd/plumed.inp outfile plumed.out
fix             1 all nph iso 3.156 3.156 10000
velocity        all create $t 4928459 mom yes dist gaussian
run             4000000

unfix           3
unfix           2
unfix           1
reset_timestep  0
velocity        all zero linear

fix             2 all temp/csvr $t $t ${damp} 685540
fix             3 all plumed plumedfile recross/plumed.inp outfile plumed.out
fix             1 all nph iso 3.156 3.156 10000
run             4000000
